<aerodynamics>
	<!-- FDM rework by YSOP on basis D-ECHO's initial version -->
        <!-- improved betadot  -->
        <!-- experimental local aoa  -->
	<hysteresis_limits unit="DEG">
		<min>9</min>
		<max>19</max>
	</hysteresis_limits>
		<function name="fcs/aileron-pos-rad-nodiff">
			<description>aileron_pos rad independent of differential</description>
				<table>
					<independentVar>fcs/left-aileron-pos-rad</independentVar>
					<tableData>
						-0.43	-0.43
						0.0	0
						0.185	0.43
					</tableData>
				</table>
		</function>

		<function name="aero/function/stall-model">
			<description>stall-model active=1 </description>
				<table>
					<independentVar>aero/alpha-deg</independentVar>
					<tableData>
						-14	1
						-13	0
						13	0
						14	1
					</tableData>
				</table>
		</function>
		<function name="aero/function/vnl">
			<description>v normal left</description>
			<sum>
			<product>
				<property>ic/v-fps</property>
				<value>0.9976</value>
			</product>
			<product>
				<property>ic/w-fps</property>
				<value>-0.0698</value>
			</product>
			</sum>
		</function>

		<function name="aero/function/vnr">
			<description>v normal right</description>
			<sum>
			<product>
				<property>ic/v-fps</property>
				<value>0.9976</value>
			</product>
			<product>
				<property>ic/w-fps</property>
				<value>0.0698</value>
			</product>
			</sum>
		</function>

		<function name="aero/function/local_alpha_sideslip_left">
			<description>change local alpha due to sideslip left</description>
			<atan2>
				<property>aero/function/vnl</property>
				<property>ic/u-fps</property>
			</atan2>
		</function>
		<function name="aero/function/local_alpha_sideslip_right">
			<description>change local alpha due to sideslip right</description>
			<atan2>
				<property>aero/function/vnr</property>
				<property>ic/u-fps</property>
			</atan2>
		</function>

		<function name="aero/function/local_alphachange_roll1l">
			<description>change local alpha due to roll</description>
			<quotient>
				<product>
					<property>velocities/p-aero-rad_sec</property>
					<value>-1</value>
					<value>10</value> <!-- y1[ft]-->
				</product>
			<property>velocities/u-aero-fps</property>
		</quotient>

		</function>
		<function name="aero/function/local_alphachange_roll1r">
			<description>change local alpha due to roll</description>
			<product>
				<property>aero/function/local_alphachange_roll1l</property>
				<value>-1</value> <!-- y1[ft]-->
			</product>
		</function>


		<function name="aero/function/local_u1l">
			<description>local u due to r</description>
			<sum>
			<product>
				<property>velocities/r-aero-rad_sec</property>
				<value>1</value> <!-- y1[ft]-->
			</product>
			<property>ic/u-fps</property>
			</sum>
		</function>

		<function name="aero/function/local_beta_tail">
			<description>local beta for vertical stabilizer</description>
				<value>1</value>
		</function>

	<!-- ########################### -->
	<!-- #########  X  ########### -->
	<!-- ########################### -->
	<axis name="X">
		<function name="aero/force/Cx_alpha_beta_stall">
			<description>Cx function of alpha beta stall</description>
			<product>
				<property>aero/qbar-psf</property>
				<property>metrics/Sw-sqft</property>
				<value>1</value>
			<table>
					<independentVar lookup="row">aero/alpha-deg</independentVar>
					<independentVar lookup="column">aero/beta-deg</independentVar>
					<tableData>
	-90.000	-25.000	-15.000	-10.000	-5.000	0.000	5.000	10.000	15.000	25.000	90.000
-90.000	0	0	0	0	0	0.000	0	0	0	0	0
-16.000	-0.284	-0.354	-0.390	-0.010	0.107	0.106	0.107	-0.010	-0.390	-0.354	-0.284
-15.000	-0.273	-0.346	-0.005	0.103	0.109	0.108	0.109	0.103	-0.005	-0.346	-0.273
-14.000	0.090	0.016	0.102	0.105	0.106	0.104	0.106	0.105	0.102	0.016	0.090
-13.000	0.190	0.115	0.102	0.100	0.107	0.106	0.107	0.100	0.102	0.115	0.190
-12.000	0.191	0.115	0.097	0.101	0.106	0.104	0.106	0.101	0.097	0.115	0.191
-11.000	0.188	0.113	0.100	0.102	0.081	0.079	0.081	0.102	0.100	0.113	0.188
-10.000	0.189	0.115	0.100	0.078	0.058	0.057	0.058	0.078	0.100	0.115	0.189
-9.000	0.187	0.113	0.078	0.056	0.038	0.037	0.038	0.056	0.078	0.113	0.187
-8.000	0.165	0.092	0.057	0.038	0.020	0.019	0.020	0.038	0.057	0.092	0.165
-7.000	0.146	0.073	0.040	0.021	0.005	0.004	0.005	0.021	0.040	0.073	0.146
-6.000	0.130	0.057	0.025	0.008	-0.007	-0.008	-0.007	0.008	0.025	0.057	0.130
-5.000	0.117	0.043	0.012	-0.003	-0.016	-0.018	-0.016	-0.003	0.012	0.043	0.117
-4.000	0.107	0.032	0.003	-0.011	-0.023	-0.024	-0.023	-0.011	0.003	0.032	0.107
-3.000	0.100	0.018	-0.010	-0.023	-0.033	-0.034	-0.033	-0.023	-0.010	0.018	0.100
-2.000	0.096	0.015	-0.012	-0.023	-0.031	-0.033	-0.031	-0.023	-0.012	0.015	0.096
-1.000	0.096	0.016	-0.009	-0.018	-0.024	-0.026	-0.024	-0.018	-0.009	0.016	0.096
0.000	0.100	0.019	-0.004	-0.012	-0.016	-0.018	-0.016	-0.012	-0.004	0.019	0.100
1.000	0.107	0.023	0.002	-0.004	-0.007	-0.008	-0.007	-0.004	0.002	0.023	0.107
2.000	0.118	0.031	0.011	0.007	0.006	0.004	0.006	0.007	0.011	0.031	0.118
3.000	0.132	0.041	0.023	0.020	0.021	0.019	0.021	0.020	0.023	0.041	0.132
4.000	0.150	0.055	0.038	0.037	0.039	0.038	0.039	0.037	0.038	0.055	0.150
5.000	0.171	0.072	0.056	0.057	0.061	0.059	0.061	0.057	0.056	0.072	0.171
6.000	0.196	0.092	0.077	0.080	0.086	0.084	0.086	0.080	0.077	0.092	0.196
7.000	0.225	0.115	0.102	0.107	0.114	0.112	0.114	0.107	0.102	0.115	0.225
8.000	0.257	0.142	0.131	0.136	0.145	0.143	0.145	0.136	0.131	0.142	0.257
9.000	0.292	0.172	0.161	0.168	0.179	0.177	0.179	0.168	0.161	0.172	0.292
10.000	0.331	0.204	0.195	0.203	0.215	0.213	0.215	0.203	0.195	0.204	0.331
11.000	0.373	0.240	0.232	0.241	0.254	0.253	0.254	0.241	0.232	0.240	0.373
12.000	0.418	0.278	0.271	0.282	0.296	0.294	0.296	0.282	0.271	0.278	0.418
13.000	0.466	0.323	0.317	0.330	0.333	0.331	0.333	0.330	0.317	0.323	0.466
14.000	0.516	0.372	0.367	0.367	0.371	0.369	0.371	0.367	0.367	0.372	0.516
15.000	0.570	0.425	0.407	0.408	0.405	0.403	0.405	0.408	0.407	0.425	0.570
16.000	0.612	0.466	0.449	0.442	0.439	0.437	0.439	0.442	0.449	0.466	0.612
17.000	0.654	0.515	0.490	0.484	0.455	0.453	0.455	0.484	0.490	0.515	0.654
18.000	0.689	0.558	0.534	0.500	0.457	0.455	0.457	0.500	0.534	0.558	0.689
19.000	0.723	0.600	0.548	0.500	0.455	0.453	0.455	0.500	0.548	0.600	0.723
20.000	0.727	0.620	0.554	0.504	0.403	0.401	0.403	0.504	0.554	0.620	0.727
21.000	0.714	0.604	0.536	0.427	0.439	0.438	0.439	0.427	0.536	0.604	0.714
22.000	0.696	0.585	0.454	0.464	0.478	0.476	0.478	0.464	0.454	0.585	0.696
90.000	0	0	0	0	0.001	0.000	0.001	0	0	0	0
					</tableData>
				</table>
			</product>
		</function>

		<function name="aero/force/Cx_speedbrake">
			<description>Drag due to speedbrakes</description>
			<product>
				<property>aero/qbar-psf</property>
				<property>metrics/Sw-sqft</property>
				<property>fcs/speedbrake-pos-norm</property>
				<value>1.5</value> <!-- subjective tuning factor -->
				<value>-0.03</value> <!-- hand calc. abt. 6ft² -->
			</product>
		</function>
		<function name="aero/force/Cx_elevator">
			<description>Drag due to Elevator Deflection</description>
			<product>
				<property>aero/qbar-psf</property>
				<property>metrics/Sw-sqft</property>
				<abs><property>fcs/elevator-pos-rad</property></abs>
				<value>-0.0037</value> <!--  VSP -->
			</product>
		</function>
<!--
		<function name="aero/force/cx_stall">
			<description>Drag due to stall</description>
			<product>
				<property>aero/qbar-psf</property>
				<property>metrics/Sw-sqft</property>
				<abs><property>aero/stall-hyst-norm</property></abs>
				<value>-0.2</value>
			</product>
		</function>
-->
<!-- Cx groundeffect missing -->

	</axis>

	<!-- ########################### -->
	<!-- #########  Z  ########### -->
	<!-- ########################### -->
	<axis name="Z">
		<function name="aero/force/Cz_alpha_beta_stall">
			<description>CZ depending on alpha, beta, stall</description>
			<product>
				<property>aero/qbar-psf</property>
				<property>metrics/Sw-sqft</property>
				<value>1</value>
				<table>
					<independentVar lookup="row">aero/alpha-deg</independentVar>
					<independentVar lookup="column">aero/beta-deg</independentVar>
					<tableData>
	-90.000	-25.000	-15.000	-10.000	-5.000	0.000	5.000	10.000	15.000	25.000	90.000
-90.000	-1.001	0.484	0.811	0.811	0.909	1.000	0.909	0.811	0.811	0.484	-1.001
-16.000	-1.329	-1.304	-1.348	0.000	0.426	0.427	0.426	0.000	-1.348	-1.304	-1.329
-15.000	-1.385	-1.360	-0.003	0.425	0.467	0.468	0.467	0.425	-0.003	-1.360	-1.385
-14.000	-0.034	-0.009	0.424	0.466	0.488	0.489	0.488	0.466	0.424	-0.009	-0.034
-13.000	0.395	0.419	0.464	0.487	0.539	0.540	0.539	0.487	0.464	0.419	0.395
-12.000	0.435	0.460	0.486	0.538	0.582	0.584	0.582	0.538	0.486	0.460	0.435
-11.000	0.457	0.481	0.536	0.581	0.496	0.498	0.496	0.581	0.536	0.481	0.457
-10.000	0.509	0.532	0.579	0.495	0.408	0.409	0.408	0.495	0.579	0.532	0.509
-9.000	0.553	0.575	0.493	0.406	0.317	0.318	0.317	0.406	0.493	0.575	0.553
-8.000	0.467	0.488	0.404	0.315	0.223	0.224	0.223	0.315	0.404	0.488	0.467
-7.000	0.378	0.399	0.312	0.221	0.127	0.129	0.127	0.221	0.312	0.399	0.378
-6.000	0.286	0.307	0.218	0.125	0.031	0.032	0.031	0.125	0.218	0.307	0.286
-5.000	0.192	0.213	0.122	0.028	-0.069	-0.068	-0.069	0.028	0.122	0.213	0.192
-4.000	0.096	0.117	0.025	-0.072	-0.170	-0.169	-0.170	-0.072	0.025	0.117	0.096
-3.000	-0.001	0.020	-0.075	-0.172	-0.272	-0.270	-0.272	-0.172	-0.075	0.020	-0.001
-2.000	-0.101	-0.081	-0.176	-0.274	-0.375	-0.374	-0.375	-0.274	-0.176	-0.081	-0.101
-1.000	-0.201	-0.182	-0.278	-0.377	-0.478	-0.477	-0.478	-0.377	-0.278	-0.182	-0.201
0.000	-0.303	-0.284	-0.381	-0.481	-0.583	-0.582	-0.583	-0.481	-0.381	-0.284	-0.303
1.000	-0.405	-0.386	-0.484	-0.585	-0.687	-0.686	-0.687	-0.585	-0.484	-0.386	-0.405
2.000	-0.507	-0.489	-0.588	-0.689	-0.791	-0.790	-0.791	-0.689	-0.588	-0.489	-0.507
3.000	-0.610	-0.593	-0.692	-0.793	-0.895	-0.894	-0.895	-0.793	-0.692	-0.593	-0.610
4.000	-0.712	-0.696	-0.796	-0.897	-0.998	-0.997	-0.998	-0.897	-0.796	-0.696	-0.712
5.000	-0.814	-0.800	-0.899	-1.000	-1.101	-1.100	-1.101	-1.000	-0.899	-0.800	-0.814
6.000	-0.915	-0.903	-1.002	-1.102	-1.203	-1.202	-1.203	-1.102	-1.002	-0.903	-0.915
7.000	-1.015	-1.005	-1.104	-1.203	-1.303	-1.303	-1.303	-1.203	-1.104	-1.005	-1.015
8.000	-1.114	-1.106	-1.204	-1.303	-1.402	-1.401	-1.402	-1.303	-1.204	-1.106	-1.114
9.000	-1.210	-1.206	-1.303	-1.401	-1.499	-1.498	-1.499	-1.401	-1.303	-1.206	-1.210
10.000	-1.305	-1.304	-1.401	-1.497	-1.593	-1.593	-1.593	-1.497	-1.401	-1.304	-1.305
11.000	-1.398	-1.400	-1.496	-1.591	-1.686	-1.686	-1.686	-1.591	-1.496	-1.400	-1.398
12.000	-1.488	-1.494	-1.589	-1.683	-1.776	-1.776	-1.776	-1.683	-1.589	-1.494	-1.488
13.000	-1.576	-1.586	-1.679	-1.771	-1.811	-1.812	-1.811	-1.771	-1.679	-1.586	-1.576
14.000	-1.661	-1.674	-1.766	-1.806	-1.845	-1.845	-1.845	-1.806	-1.766	-1.674	-1.661
15.000	-1.744	-1.760	-1.800	-1.838	-1.848	-1.849	-1.848	-1.838	-1.800	-1.760	-1.744
16.000	-1.773	-1.792	-1.831	-1.840	-1.850	-1.851	-1.850	-1.840	-1.831	-1.792	-1.773
17.000	-1.803	-1.821	-1.831	-1.840	-1.764	-1.765	-1.764	-1.840	-1.831	-1.821	-1.803
18.000	-1.804	-1.820	-1.829	-1.752	-1.638	-1.640	-1.638	-1.752	-1.829	-1.820	-1.804
19.000	-1.804	-1.818	-1.742	-1.627	-1.514	-1.515	-1.514	-1.627	-1.742	-1.818	-1.804
20.000	-1.723	-1.729	-1.615	-1.501	-1.237	-1.237	-1.237	-1.501	-1.615	-1.729	-1.723
21.000	-1.598	-1.607	-1.494	-1.231	-1.277	-1.278	-1.277	-1.231	-1.494	-1.607	-1.598
22.000	-1.473	-1.485	-1.225	-1.271	-1.317	-1.318	-1.317	-1.271	-1.225	-1.485	-1.473
90.000	1.011	-0.489	-0.715	-0.820	-0.918	-1.010	-0.918	-0.820	-0.715	-0.489	1.011
					</tableData>
				</table>
				<!--(ported from C172p:) ground effect--> <!--  VSP -->
				<table>
					<independentVar>aero/h_b-cg-ft</independentVar>
					<tableData>
						0.0000	1.2
						0.0500	1.1
						0.1800	1.044
						0.3600	1.000
					</tableData>
				</table>
			</product>
		</function>

		<function name="aero/force/Lift_speedbrake">
			<description>Delta Lift due to speedbrake</description>
			<product>
				<property>aero/qbar-psf</property>
				<property>metrics/Sw-sqft</property>
				<property>fcs/speedbrake-pos-norm</property>
				<value>0.13</value> <!--hand calculation 15% lift loss -->
			</product>
		</function>

		<function name="aero/force/Lift_elevator">
			<description>Lift due to Elevator Deflection</description>
			<product>
				<property>aero/qbar-psf</property>
				<property>metrics/Sw-sqft</property>
				<property>fcs/elevator-pos-rad</property>
				<value>0.75</value>
				<value>-0.285</value> <!-- VSP -->
			</product>
		</function>
	</axis>

	<!-- ########################### -->
	<!-- #########  Y  ########### -->
	<!-- ########################### -->
	<axis name="Y">

		<function name="aero/force/Cy_beta">
			<description>Side force due to beta</description>
			<product>
			<value>1</value>
				<property>aero/qbar-psf</property>
				<property>metrics/Sw-sqft</property>
				<table>
					<independentVar lookup="row">aero/alpha-deg</independentVar>
					<independentVar lookup="column">aero/beta-deg</independentVar>
					<tableData>
	-90.000	-25.000	-15.000	-10.000	-5.000	0.000	5.000	10.000	15.000	25.000	90.000
-90.000	1.001	0.499	0.207	0.207	0.104	0.000	-0.104	-0.207	-0.207	-0.499	-1.001
-16.000	0.017	0.083	0.053	0.036	0.018	0.000	-0.018	-0.036	-0.053	-0.083	-0.017
-15.000	0.017	0.083	0.053	0.036	0.018	0.000	-0.018	-0.036	-0.053	-0.083	-0.017
-14.000	0.018	0.083	0.053	0.036	0.018	0.000	-0.018	-0.036	-0.053	-0.083	-0.018
-13.000	0.019	0.084	0.053	0.036	0.018	0.000	-0.018	-0.036	-0.053	-0.084	-0.019
-12.000	0.020	0.084	0.054	0.036	0.018	0.000	-0.018	-0.036	-0.054	-0.084	-0.020
-11.000	0.018	0.083	0.053	0.036	0.018	0.000	-0.018	-0.036	-0.053	-0.083	-0.018
-10.000	0.016	0.083	0.053	0.036	0.018	0.000	-0.018	-0.036	-0.053	-0.083	-0.016
-9.000	0.014	0.082	0.052	0.035	0.018	0.000	-0.018	-0.035	-0.052	-0.082	-0.014
-8.000	0.013	0.081	0.052	0.035	0.018	0.000	-0.018	-0.035	-0.052	-0.081	-0.013
-7.000	0.013	0.081	0.052	0.035	0.018	0.000	-0.018	-0.035	-0.052	-0.081	-0.013
-6.000	0.012	0.081	0.052	0.035	0.018	0.000	-0.018	-0.035	-0.052	-0.081	-0.012
-5.000	0.012	0.081	0.052	0.035	0.018	0.000	-0.018	-0.035	-0.052	-0.081	-0.012
-4.000	0.013	0.081	0.052	0.035	0.018	0.000	-0.018	-0.035	-0.052	-0.081	-0.013
-3.000	0.021	0.085	0.054	0.037	0.018	0.000	-0.018	-0.037	-0.054	-0.085	-0.021
-2.000	0.020	0.084	0.054	0.036	0.018	0.000	-0.018	-0.036	-0.054	-0.084	-0.020
-1.000	0.018	0.084	0.053	0.036	0.018	0.000	-0.018	-0.036	-0.053	-0.084	-0.018
0.000	0.019	0.084	0.053	0.036	0.018	0.000	-0.018	-0.036	-0.053	-0.084	-0.019
1.000	0.021	0.085	0.054	0.037	0.019	0.000	-0.019	-0.037	-0.054	-0.085	-0.021
2.000	0.024	0.086	0.055	0.037	0.019	0.000	-0.019	-0.037	-0.055	-0.086	-0.024
3.000	0.028	0.088	0.056	0.038	0.019	0.000	-0.019	-0.038	-0.056	-0.088	-0.028
4.000	0.033	0.090	0.057	0.039	0.019	0.000	-0.019	-0.039	-0.057	-0.090	-0.033
5.000	0.038	0.092	0.058	0.039	0.020	0.000	-0.020	-0.039	-0.058	-0.092	-0.038
6.000	0.043	0.094	0.060	0.040	0.020	0.000	-0.020	-0.040	-0.060	-0.094	-0.043
7.000	0.048	0.096	0.061	0.041	0.021	0.000	-0.021	-0.041	-0.061	-0.096	-0.048
8.000	0.054	0.099	0.062	0.042	0.021	0.000	-0.021	-0.042	-0.062	-0.099	-0.054
9.000	0.060	0.101	0.064	0.043	0.022	0.000	-0.022	-0.043	-0.064	-0.101	-0.060
10.000	0.067	0.104	0.066	0.045	0.023	0.000	-0.023	-0.045	-0.066	-0.104	-0.067
11.000	0.075	0.107	0.068	0.046	0.023	0.000	-0.023	-0.046	-0.068	-0.107	-0.075
12.000	0.082	0.111	0.070	0.047	0.024	0.000	-0.024	-0.047	-0.070	-0.111	-0.082
13.000	0.086	0.112	0.071	0.048	0.024	0.000	-0.024	-0.048	-0.071	-0.112	-0.086
14.000	0.089	0.113	0.071	0.048	0.024	0.000	-0.024	-0.048	-0.071	-0.113	-0.089
15.000	0.090	0.114	0.072	0.049	0.024	0.000	-0.024	-0.049	-0.072	-0.114	-0.090
16.000	0.091	0.114	0.072	0.049	0.025	0.000	-0.025	-0.049	-0.072	-0.114	-0.091
17.000	0.084	0.111	0.070	0.047	0.024	0.000	-0.024	-0.047	-0.070	-0.111	-0.084
18.000	0.074	0.107	0.068	0.046	0.023	0.000	-0.023	-0.046	-0.068	-0.107	-0.074
19.000	0.065	0.103	0.065	0.044	0.022	0.000	-0.022	-0.044	-0.065	-0.103	-0.065
20.000	0.047	0.096	0.061	0.041	0.021	0.000	-0.021	-0.041	-0.061	-0.096	-0.047
21.000	0.050	0.097	0.061	0.042	0.021	0.000	-0.021	-0.042	-0.061	-0.097	-0.050
22.000	0.053	0.098	0.062	0.042	0.021	0.000	-0.021	-0.042	-0.062	-0.098	-0.053
90.000	1.011	0.503	0.310	0.209	0.105	0.000	-0.105	-0.209	-0.310	-0.503	-1.011
					</tableData>
				</table>
			</product>
		</function>
		<function name="aero/force/side_rudder">
			<description>Side force due to rudder</description>
			<product>
				<property>aero/qbar-psf</property>
				<property>metrics/Sw-sqft</property>
				<property>fcs/rudder-pos-rad</property>
				<value>0.75</value>
				<value>-1</value>
				<table>
					<independentVar lookup="row">aero/alpha-deg</independentVar>
					<independentVar lookup="column">aero/beta-deg</independentVar>
					<tableData>
	-15	-10	-5	0	5	10	15
-8	-0.1031691	-0.1226913	-0.140939	-0.1338754	-0.140939	-0.1226913	-0.1031691
-4	-0.1256194	-0.1318155	-0.1290955	-0.1325629	-0.1290955	-0.1318155	-0.1256194
0	-0.1127464	-0.1300325	-0.122018	-0.1296754	-0.122018	-0.1300325	-0.1127464
4	-0.1881279	-0.1136363	-0.1239385	-0.1267933	-0.1239385	-0.1136363	-0.1881279
8	-0.1148732	-0.1544664	-0.1210889	-0.1227799	-0.1210889	-0.1544664	-0.1148732
12	-0.0957896	-0.1169876	-0.1121054	-0.1167313	-0.1121054	-0.1169876	-0.0957896
					</tableData>
				</table>


			</product>
		</function>
		<function name="aero/force/sideforce_yawrate">
			<description>Side force due to yaw rate</description> <!-- VSP -->
			<product>
				<property>aero/qbar-psf</property>
				<property>metrics/Sw-sqft</property>
<!--				<property>aero/bi2vel</property> -->
				<property>velocities/r-aero-rad_sec</property>
				<value>1</value>
				<table>
					<independentVar lookup="row">aero/alpha-deg</independentVar>
					<independentVar lookup="column">aero/beta-deg</independentVar>
					<tableData>
	-15	-10	-5	0	5	10	15
-8	0.1269441	0.1266852	0.1268527	0.1288959	0.1268527	0.1266852	0.1269441
-4	0.1369676	0.1352958	0.1355931	0.1382812	0.1355931	0.1352958	0.1369676
0	0.1463808	0.141703	0.145138	0.1463365	0.145138	0.141703	0.1463808
4	0.1495888	0.1534887	0.1525785	0.1542872	0.1525785	0.1534887	0.1495888
8	0.1608248	0.1618592	0.1607292	0.1631441	0.1607292	0.1618592	0.1608248
12	0.1671726	0.166853	0.1676256	0.1693834	0.1676256	0.166853	0.1671726
					</tableData>
				</table>
			</product>
		</function>
		<function name="aero/force/sideforce_rollrate">
			<description>Side force due to roll rate</description> <!-- VSP -->
			<product>
				<property>aero/qbar-psf</property>
				<property>metrics/Sw-sqft</property>
				<property>aero/bi2vel</property>
				<property>velocities/p-rad_sec</property>
				<value>1</value>
				<table>
					<independentVar lookup="row">aero/alpha-deg</independentVar>
					<independentVar lookup="column">aero/beta-deg</independentVar>
					<tableData>
	-15	-10	-5	0	5	10	15
-8	-0.1126372	-0.1180966	-0.1195142	-0.1208147	-0.1195142	-0.1180966	-0.1126372
-4	-0.1121262	-0.1163415	-0.1161356	-0.1177157	-0.1161356	-0.1163415	-0.1121262
0	-0.1157735	-0.113261	-0.1153022	-0.114824	-0.1153022	-0.113261	-0.1157735
4	-0.1172368	-0.1172239	-0.1147099	-0.1157804	-0.1147099	-0.1172239	-0.1172368
8	-0.1115462	-0.1177193	-0.1179128	-0.1107509	-0.1179128	-0.1177193	-0.1115462
12	-0.1211805	-0.1210369	-0.1221807	-0.1180256	-0.1221807	-0.1210369	-0.1211805
					</tableData>
				</table>
			</product>
		</function>
	</axis>
	<!-- ########################### -->
	<!-- #########  ROLL  ########### -->
	<!-- ########################### -->
	<axis name="ROLL">
		<function name="aero/moment/Roll_beta">
			<description>Roll moment due to beta</description> <!-- VSP -->
			<product>
				<property>aero/qbar-psf</property>
				<property>metrics/Sw-sqft</property>
				<property>metrics/bw-ft</property>
				<property>aero/beta-rad</property>
				<value>1.5</value> <!-- sign change * sign change, experimental, should be f(g-load) -->
				<table>
					<independentVar lookup="row">aero/alpha-deg</independentVar>
					<independentVar lookup="column">aero/beta-deg</independentVar>
					<tableData>
	-15	-10	-5	0	5	10	15
-8	-0.0157146	-0.010472	-0.0048342	-0.0006988	0.0048342	0.010472	0.0157146
-4	-0.0150291	-0.009982	-0.0046615	-0.0005944	0.0046615	0.009982	0.0150291
0	-0.0142649	-0.0095095	-0.0044857	-0.0004885	0.0044857	0.0095095	0.0142649
4	-0.0134668	-0.0090556	-0.0042724	-0.0003983	0.0042724	0.0090556	0.0134668
8	-0.0127321	-0.0085585	-0.0040251	0.0048342	0.0040251	0.0085585	0.0127321
12	-0.0119673	-0.0079878	-0.0038938	0.0046615	0.0038938	0.0079878	0.0119673
					</tableData>
				</table>
			</product>
		</function>
		<function name="aero/moment/roll_damp2">
			<description>Roll damping derivative</description> <!-- VSP -->
			<product>
				<property>aero/qbar-psf</property>
				<property>metrics/Sw-sqft</property>
				<property>metrics/bw-ft</property>
				<property>aero/bi2vel</property>
				<property>velocities/p-aero-rad_sec</property>
				<value>-1</value> <!-- sign change -->
				<table>
					<independentVar lookup="row">aero/alpha-deg</independentVar>
					<independentVar lookup="column">aero/beta-deg</independentVar>
					<tableData>
	-15	-10	-5	0	5	10	15
-8	0.6001555	0.6122558	0.619891	0.6219866	0.619891	0.6122558	0.6001555
-4	0.604289	0.6166326	0.6230314	0.6254532	0.6230314	0.6166326	0.604289
0	0.6082478	0.6196049	0.6274885	0.6286213	0.6274885	0.6196049	0.6082478
4	0.611413	0.6228806	0.6297988	0.6313672	0.6297988	0.6228806	0.611413
8	0.6130785	0.6240651	0.6323694	0.6334499	0.6323694	0.6240651	0.6130785
12	0.6154972	0.6264152	0.6342765	0.634974	0.6342765	0.6264152	0.6154972
					</tableData>
				</table>
			</product>
		</function>
		<function name="aero/moment/roll_yawrate">
			<description>roll moment due to yaw rate</description> <!-- VSP -->
			<product>
				<property>aero/qbar-psf</property>
				<property>metrics/Sw-sqft</property>
				<property>metrics/bw-ft</property>
				<property>aero/bi2vel</property>
				<value>1</value> <!-- tuning -->
				<value>-1</value>
				<property>velocities/r-aero-rad_sec</property>
				<table>
					<independentVar lookup="row">aero/alpha-deg</independentVar>
					<independentVar lookup="column">aero/beta-deg</independentVar>
					<tableData>
	-15	-10	-5	0	5	10	15
-8	-0.0411347	-0.0422486	-0.0426909	-0.0429783	-0.0426909	-0.0422486	-0.0411347
-4	-0.0877593	-0.0896423	-0.0907546	-0.0913176	-0.0907546	-0.0896423	-0.0877593
0	-0.1343207	-0.1369869	-0.1387228	-0.1393916	-0.1387228	-0.1369869	-0.1343207
4	-0.1799262	-0.1836817	-0.1859272	-0.1867319	-0.1859272	-0.1836817	-0.1799262
8	-0.2249717	-0.2294513	-0.2320634	-0.2334728	-0.2320634	-0.2294513	-0.2249717
12	-0.2685402	-0.2740721	-0.2776083	-0.2786855	-0.2776083	-0.2740721	-0.2685402
					</tableData>
				</table>
			</product>
		</function>

		<function name="aero/moment/roll_betadot">
			<description>roll moment due to betadot</description> <!-- VSP -->
			<product>
				<property>aero/qbar-psf</property>
				<property>metrics/Sw-sqft</property>
				<property>metrics/bw-ft</property>
				<property>aero/bi2vel</property>
				<value>-0.023</value>
				<property>aero/betadot-rad_sec</property>
<!--				<table>
					<independentVar lookup="row">aero/alpha-deg</independentVar>
					<independentVar lookup="column">aero/beta-deg</independentVar>
					<tableData>
	-15	-10	-5	0	5	10	15
-8	-0.0411347	-0.0422486	-0.0426909	-0.0429783	-0.0426909	-0.0422486	-0.0411347
-4	-0.0877593	-0.0896423	-0.0907546	-0.0913176	-0.0907546	-0.0896423	-0.0877593
0	-0.1343207	-0.1369869	-0.1387228	-0.1393916	-0.1387228	-0.1369869	-0.1343207
4	-0.1799262	-0.1836817	-0.1859272	-0.1867319	-0.1859272	-0.1836817	-0.1799262
8	-0.2249717	-0.2294513	-0.2320634	-0.2334728	-0.2320634	-0.2294513	-0.2249717
12	-0.2685402	-0.2740721	-0.2776083	-0.2786855	-0.2776083	-0.2740721	-0.2685402
					</tableData>
				</table>
-->
			</product>
		</function>


		<function name="aero/moment/Roll_aileron">
			<description>Roll moment due to aileron</description> <!-- VSP, includes differential ailerons -->
			<product>
				<property>aero/qbar-psf</property>
				<property>metrics/Sw-sqft</property>
				<property>metrics/bw-ft</property>
				<property>fcs/aileron-pos-rad-nodiff</property>
				<value>0.75</value>
				<value>1</value>
				<table>
					<independentVar lookup="row">aero/alpha-deg</independentVar>
					<independentVar lookup="column">aero/beta-deg</independentVar>
					<tableData>
	-15	-10	-5	0	5	10	15
-8	0.2140094	0.2258142	0.2364655	0.2476204	0.2364655	0.2258142	0.2140094
-4	0.2102283	0.2348633	0.2369087	0.2469678	0.2369087	0.2348633	0.2102283
0	0.2103945	0.2229718	0.2375573	0.2456538	0.2375573	0.2229718	0.2103945
4	0.1967102	0.2301369	0.2350298	0.2384293	0.2350298	0.2301369	0.1967102
8	0.2064972	0.2212451	0.246737	0.2382347	0.246737	0.2212451	0.2064972
12	0.2016036	0.2219671	0.2205251	0.2273003	0.2205251	0.2219671	0.2016036
					</tableData>
				</table>
				<!-- (ported from c172p:) the ailerons are less efficient and even create an opposite roll moment close to stall because deflection down makes the wing portion stall-->
				<table>
					<independentVar lookup="row">aero/alpha-deg</independentVar>
					<tableData>
						15    1
						16    0.3
						18   -0.1
					</tableData>
				</table>
			</product>
		</function>
		<function name="aero/moment/Roll_rudder">
			<description>Roll moment due to rudder</description>
			<product>
				<property>aero/qbar-psf</property>
				<property>metrics/Sw-sqft</property>
				<property>metrics/bw-ft</property>
				<property>fcs/rudder-pos-rad</property>
				<value>0.75</value>
				<table>
					<independentVar lookup="row">aero/alpha-deg</independentVar>
					<independentVar lookup="column">aero/beta-deg</independentVar>
					<tableData>
	-15	-10	-5	0	5	10	15
-8	0.0043483	0.0048528	0.006059	0.0056956	0.006059	0.0048528	0.0043483
-4	0.005223	0.0055329	0.0053086	0.0054651	0.0053086	0.0055329	0.005223
0	0.0044317	0.0046515	0.0050112	0.0052791	0.0050112	0.0046515	0.0044317
4	0.0075584	0.0043133	0.0047186	0.0048747	0.0047186	0.0043133	0.0075584
8	0.0041687	0.0046348	0.004606	0.0045588	0.004606	0.0046348	0.0041687
12	0.0048972	0.0051949	0.0039821	0.003987	0.0039821	0.0051949	0.0048972
					</tableData>
				</table>
			</product>
		</function>
	</axis>
	<!-- ########################### -->
	<!-- #########  PITCH  ########### -->
	<!-- ########################### -->
	<axis name="PITCH">
		<function name="aero/moment/pitch_base">
			<description>Pitch moment alpha</description>
			<product>
				<property>aero/qbar-psf</property>
				<property>metrics/Sw-sqft</property>
				<property>metrics/cbarw-ft</property>
<!--				<value>-0.0329</value>  VSP, new introduced due to shift AeroRP -->
				<table>
					<independentVar lookup="row">aero/alpha-deg</independentVar>
					<independentVar lookup="column">aero/beta-deg</independentVar>
					<tableData>
	-15	-10	-5	0	5	10	15
-8	0.023444	0.0560639	0.0716718	0.082572	0.0716718	0.0560639	0.023444
-4	-0.0401382	-0.0015833	0.0181384	0.0242609	0.0181384	-0.0015833	-0.0401382
0	-0.0955042	-0.0672494	-0.0464471	-0.0404786	-0.0464471	-0.0672494	-0.0955042
4	-0.1698614	-0.1414385	-0.119219	-0.1128546	-0.119219	-0.1414385	-0.1698614
8	-0.229033	-0.215585	-0.1996657	-0.1922589	-0.1996657	-0.215585	-0.229033
12	-0.3047074	-0.2903614	-0.2819356	-0.2777949	-0.2819356	-0.2903614	-0.3047074
90	-1	-1	-1	-1	-1	-1	-1
					</tableData>
				</table>
			</product>
		</function>

		<function name="aero/moment/Pitch_elevator">
			<description>Pitch moment due to elevator</description>
			<product>
				<property>aero/qbar-psf</property>
				<property>metrics/Sw-sqft</property>
				<property>metrics/cbarw-ft</property>
				<property>fcs/elevator-pos-rad</property>
				<table>
					<independentVar lookup="row">aero/alpha-deg</independentVar>
					<independentVar lookup="column">velocities/mach</independentVar> <!-- erstmal gelassen 3.25 viel zu klein VSP -->
					<tableData>
						0.05	0.1	0.15	0.2	0.25
						-4	-1.322	-1.326	-1.332	-1.34	-1.353
						-2	-1.338	-1.341	-1.348	-1.356	-1.368
						0	-1.348	-1.352	-1.359	-1.365	-1.376
						2	-1.356	-1.359	-1.363	-1.37	-1.382
						4	-1.356	-1.36	-1.365	-1.374	-1.386
						6	-1.354	-1.358	-1.362	-1.371	-1.387
						8	-1.345	-1.349	-1.357	-1.38	-1.377
					</tableData>
				</table>
				<!--(ported from C172p): the elevator looses efficiency when stalled-->
				<table>
					<independentVar lookup="row">fcs/elevator-pos-rad</independentVar>
					<independentVar lookup="column">aero/alpha-deg</independentVar>
					<tableData>
						20  25   35     45     55      65      90
						-0.49   1   0.5  0.2    0.1    0.1     0.1     0.1
						0       1   0.6  0.3    0.15   0.1     0.1     0.1
						0.40    1   0.9  0.8    0.7    0.6     0.5     0.4
					</tableData>
				</table>
			</product>
		</function>
		<function name="aero/moment/pitch_damp">
			<description>Pitch damping derivative</description> <!-- VSP -->
			<product>
				<property>aero/qbar-psf</property>
				<property>metrics/Sw-sqft</property>
				<property>metrics/cbarw-ft</property>
				<property>aero/ci2vel</property>
				<property>velocities/q-aero-rad_sec</property>
				<table>
					<independentVar lookup="row">aero/alpha-deg</independentVar>
					<independentVar lookup="column">aero/beta-deg</independentVar>
					<tableData>
	-15	-10	-5	0	5	10	15
-8	-20.2790689	-20.9492977	-20.9030585	-21.1917353	-20.9030585	-20.9492977	-20.2790689
-4	-19.4670489	-20.7794983	-21.3060432	-21.2515781	-21.3060432	-20.7794983	-19.4670489
0	-20.2998403	-20.5955905	-21.4862399	-21.371362	-21.4862399	-20.5955905	-20.2998403
4	-19.0044821	-20.7775299	-21.5054795	-21.6204652	-21.5054795	-20.7775299	-19.0044821
8	-20.8811897	-20.9017362	-21.5733107	-21.8868607	-21.5733107	-20.9017362	-20.8811897
12	-21.1899227	-21.6628314	-22.1381759	-22.2892053	-22.1381759	-21.6628314	-21.1899227
					</tableData>
				</table>
			</product>
		</function>
		<function name="aero/moment/Pitch_alphadot">
			<description>Pitch moment due to alpha rate</description>
			<product>
				<property>aero/qbar-psf</property>
				<property>metrics/Sw-sqft</property>
				<property>metrics/cbarw-ft</property>
				<property>aero/ci2vel</property>
				<property>aero/alphadot-rad_sec</property>
				<value>-10</value>
			</product>
		</function>
		<function name="aero/force/pitch speedbrake">
			<description>pitch up speedbrake</description>
			<product>
				<property>aero/qbar-psf</property>
				<property>metrics/Sw-sqft</property>
				<property>metrics/cbarw-ft</property>
				<property>fcs/speedbrake-pos-norm</property>
				<value>0.05</value> <!--guessing -->
			</product>
		</function>
	</axis>
	<!-- ########################### -->
	<!-- #########  YAW  ########### -->
	<!-- ########################### -->
	<axis name="YAW">
<!-- VSP, war 0.15
    <function name="aero/moment/Yaw_beta">
       <description>Yaw moment due to beta</description>
       <product>
           <property>aero/qbar-psf</property>
           <property>metrics/Sw-sqft</property>
           <property>metrics/bw-ft</property>
           <property>aero/beta-rad</property>
           <value>0.0362</value>
       </product>
    </function>
-->
		<function name="aero/moment/Yaw_beta">
			<description>Yaw moment due to beta</description>
			<product>
				<property>aero/qbar-psf</property>
				<property>metrics/Sw-sqft</property>
				<property>metrics/bw-ft</property>
				<value>-1</value>
				<value>2.18</value> <!-- from CFD to correct VSP -->
				<table>
					<independentVar lookup="row">aero/alpha-deg</independentVar>
					<independentVar lookup="column">aero/beta-deg</independentVar>
					<tableData>
	-179	-90	-25	-15	-10	-5	0	5	10	15	25	90	180
-8	0	0.0300	0.0222	0.0133	0.0092	0.0046	-0.0006	-0.0046	-0.0092	-0.0133	-0.0222	-0.0300	0
-4	0	0.0300	0.0173	0.0104	0.0072	0.0038	-0.0005	-0.0038	-0.0072	-0.0104	-0.0173	-0.0300	0
0	0	0.0300	0.0141	0.0084	0.0059	0.0032	-0.0004	-0.0032	-0.0059	-0.0084	-0.0141	-0.0300	0
4	0	0.0300	0.0113	0.0068	0.0048	0.0026	-0.0004	-0.0026	-0.0048	-0.0068	-0.0113	-0.0300	0
8	0	0.0300	0.0105	0.0063	0.0042	0.0022	-0.0003	-0.0022	-0.0042	-0.0063	-0.0105	-0.0300	0
12	0	0.0300	0.0095	0.0057	0.0042	0.0019	-0.0002	-0.0019	-0.0042	-0.0057	-0.0095	-0.0300	0
					</tableData>
				</table>

			</product>
		</function>

		<function name="aero/moment/Yaw_damp">
			<description>Yaw damping derivative</description> <!-- VSP -->
			<product>
				<property>aero/qbar-psf</property>
				<property>metrics/Sw-sqft</property>
				<property>metrics/bw-ft</property>
				<property>aero/bi2vel</property>
				<property>velocities/r-aero-rad_sec</property>
				<value>2</value> <!-- tuning für 0,13 and a bit more -->
				<value>-1</value>
				<table>
					<independentVar lookup="row">aero/alpha-deg</independentVar>
					<independentVar lookup="column">aero/beta-deg</independentVar>
					<tableData>
	-15	-10	-5	0	5	10	15
-8	0.0422133	0.0420251	0.0407139	0.0417369	0.0407139	0.0420251	0.0422133
-4	0.0380848	0.0412127	0.0370932	0.0384536	0.0370932	0.0412127	0.0380848
0	0.0332719	0.0334351	0.0339137	0.0351381	0.0339137	0.0334351	0.0332719
4	0.0296493	0.0386434	0.0313154	0.0319823	0.0313154	0.0386434	0.0296493
8	0.0307627	0.0324976	0.0291292	0.0296393	0.0291292	0.0324976	0.0307627
12	0.0264323	0.0278516	0.0265288	0.0273277	0.0265288	0.0278516	0.0264323
					</tableData>
				</table>
			</product>
		</function>

		<function name="aero/moment/yaw_betadot">
			<description>yaw moment due to betadot</description> <!-- VSP -->
			<product>
				<property>aero/qbar-psf</property>
				<property>metrics/Sw-sqft</property>
				<property>metrics/bw-ft</property>
				<property>aero/bi2vel</property>
				<value>-0.012</value>
				<property>aero/betadot-rad_sec</property>
<!--				<table>
					<independentVar lookup="row">aero/alpha-deg</independentVar>
					<independentVar lookup="column">aero/beta-deg</independentVar>
					<tableData>
	-15	-10	-5	0	5	10	15
-8	-0.0411347	-0.0422486	-0.0426909	-0.0429783	-0.0426909	-0.0422486	-0.0411347
-4	-0.0877593	-0.0896423	-0.0907546	-0.0913176	-0.0907546	-0.0896423	-0.0877593
0	-0.1343207	-0.1369869	-0.1387228	-0.1393916	-0.1387228	-0.1369869	-0.1343207
4	-0.1799262	-0.1836817	-0.1859272	-0.1867319	-0.1859272	-0.1836817	-0.1799262
8	-0.2249717	-0.2294513	-0.2320634	-0.2334728	-0.2320634	-0.2294513	-0.2249717
12	-0.2685402	-0.2740721	-0.2776083	-0.2786855	-0.2776083	-0.2740721	-0.2685402
					</tableData>
				</table>
-->
			</product>
		</function>


		<function name="aero/moment/yaw_rollrate">
			<description>Yaw moment due to roll rate</description> <!-- VSP -->
			<product>
				<property>aero/qbar-psf</property>
				<property>metrics/Sw-sqft</property>
				<property>metrics/bw-ft</property>
				<property>aero/bi2vel</property>
				<value>-1</value>
				<property>velocities/p-aero-rad_sec</property>
				<table>
					<independentVar lookup="row">aero/alpha-deg</independentVar>
					<independentVar lookup="column">aero/beta-deg</independentVar>
					<tableData>
	-15	-10	-5	0	5	10	15
-8	-0.0971191	-0.1024859	-0.1040273	-0.1022979	-0.1040273	-0.1024859	-0.0971191
-4	-0.0229875	-0.0250209	-0.0274119	-0.0250721	-0.0274119	-0.0250209	-0.0229875
0	0.0546548	0.0512433	0.0533239	0.0544786	0.0533239	0.0512433	0.0546548
4	0.1252889	0.1333774	0.1345148	0.1375145	0.1345148	0.1333774	0.1252889
8	0.2058285	0.2090731	0.2139136	0.217931	0.2139136	0.2090731	0.2058285
12	0.2804175	0.2881526	0.2949462	0.3021611	0.2949462	0.2881526	0.2804175
					</tableData>
				</table>
			</product>
		</function>
		<function name="aero/moment/Yaw_rudder">
			<description>Yaw moment due to rudder</description> <!-- VSP -->
			<product>
				<property>aero/qbar-psf</property>
				<property>metrics/Sw-sqft</property>
				<property>metrics/bw-ft</property>
				<property>fcs/rudder-pos-rad</property>
				<value>7.25</value> <!-- strange in VSP 3.25 -->
				<value>-1</value> <!-- sign -->
				<value>0.75</value>
				<table>
					<independentVar lookup="row">aero/alpha-deg</independentVar>
					<independentVar lookup="column">aero/beta-deg</independentVar>
					<tableData>
	-15	-10	-5	0	5	10	15
-8	0.0043483	0.0048528	0.006059	0.0056956	0.006059	0.0048528	0.0043483
-4	0.005223	0.0055329	0.0053086	0.0054651	0.0053086	0.0055329	0.005223
0	0.0044317	0.0046515	0.0050112	0.0052791	0.0050112	0.0046515	0.0044317
4	0.0075584	0.0043133	0.0047186	0.0048747	0.0047186	0.0043133	0.0075584
8	0.0041687	0.0046348	0.004606	0.0045588	0.004606	0.0046348	0.0041687
12	0.0048972	0.0051949	0.0039821	0.003987	0.0039821	0.0051949	0.0048972
					</tableData>
				</table>
			</product>
		</function>
		<function name="aero/moment/Yaw_aileron">
			<description>Adverse yaw</description>
			<product>
				<property>aero/qbar-psf</property>
				<property>metrics/Sw-sqft</property>
				<property>metrics/bw-ft</property>
				<property>fcs/aileron-pos-rad-nodiff</property>
				<value>0.75</value>
				<value>1</value> <!-- sign -->
				<table>
					<independentVar lookup="row">aero/alpha-deg</independentVar>
					<independentVar lookup="column">aero/beta-deg</independentVar>
					<tableData>
	-15	-10	-5	0	5	10	15
-8	-0.0237533	-0.0245358	-0.0250447	-0.026023	-0.0250447	-0.0245358	-0.0237533
-4	-0.0102288	-0.0112718	-0.0162091	-0.0155805	-0.0162091	-0.0112718	-0.0102288
0	-0.0052325	-0.0049315	-0.0049599	-0.0069079	-0.0049599	-0.0049315	-0.0052325
4	0.0018857	0.0038966	0.0029265	0.0027112	0.0029265	0.0038966	0.0018857
8	0.0119858	0.0170347	0.0132132	0.0119802	0.0132132	0.0170347	0.0119858
12	0.0190037	0.0347489	0.0201955	0.0211202	0.0201955	0.0347489	0.0190037
					</tableData>
				</table>
			</product>
		</function>

	</axis>

</aerodynamics>
